# [reference: rfp2mcd(c) Release [mcd14].xmcd]
# Техническое задание
i := 1
# Требуемая холодопроизводительность:
Q_x := 100*Вт
hfld := "C:\Rfp8\fluids\HELIUM.FLD"
# Температурный уровень охлаждения:
T_x := 20 K
ierr_SETUP(i, hfld, hfm, hrf) = 0
# Давление компримирования:
p_6 := 1*МПа
x_tst := [1]
# Давление наименьшее в ресивере РС_Б:
p_5 := 0.1*МПа
# Температура сброса теплоты в КХ:
T_k := 80 K
# Изоэнтропный КПД КМ:
η_s_КМ := 0.8
# Разность температур в ТОА:
ΔT_ТОА := 3 K
# Разность температур в охладителе:
ΔT_КХ := 5 K
# Разность температур в регенераторе:
ΔT_Р := 5 K
# Тепловой расчет машины Гиффорда-Макмагона
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# Обозначения на схеме:
# КМ - компрессорная машина; КХ - концевой холодильник; ВН1, ВН2 - клапан впускной и выпускной, Ц - цилиндр с вытеснительным поршнем; РС - ресивесы высокого и низкого давления;
# Параметры рабочего вещества после КМ и КХ:
T_1(p_5, p_6, T_k, T_x) := T_k + ΔT_КХ
p_1(p_5, p_6, T_k, T_x) := p_6
h_1(p_5, p_6, T_k, T_x) := h_Tpz(T_1(p_5, p_6, T_k, T_x), p_1(p_5, p_6, T_k, T_x), x_tst)
p_1(p_5, p_6, T_k, T_x) = 1 МПа
T_1(p_5, p_6, T_k, T_x) = 85 K
T_1(p_5, p_6, T_k, T_x) = -188.15 °C
h_1(p_5, p_6, T_k, T_x) = 448.724 кДж/кг
# Параметры рабочего вещества в процессе охлаждения в ТОА:
T_4(p_5, p_6, T_k, T_x) := T_x - ΔT_ТОА
p_4(p_5, p_6, T_k, T_x) := p_5
h_4(p_5, p_6, T_k, T_x) := h_Tpz(T_4(p_5, p_6, T_k, T_x), p_4(p_5, p_6, T_k, T_x), x_tst)
T_4'(p_5, p_6, T_k, T_x) := T_x
p_4'(p_5, p_6, T_k, T_x) := p_5
T_4(p_5, p_6, T_k, T_x) = 17 K
T_4(p_5, p_6, T_k, T_x) = -256.15 °C
p_4(p_5, p_6, T_k, T_x) = 0.1 МПа
h_4(p_5, p_6, T_k, T_x) = 92.7988 кДж/кг
T_4'(p_5, p_6, T_k, T_x) = 20 K
T_4'(p_5, p_6, T_k, T_x) = -253.15 °C
p_4'(p_5, p_6, T_k, T_x) = 0.1 МПа
# Показатель адиабаты по определению:
k(p_5, p_6, T_k, T_x) := C_p_Tpz(T_1(p_5, p_6, T_k, T_x), p_1(p_5, p_6, T_k, T_x), x_tst)/C_v_Tpz(T_1(p_5, p_6, T_k, T_x), p_1(p_5, p_6, T_k, T_x), x_tst)
k(p_5, p_6, T_k, T_x) = 1.66994
# Параметры рабочего вещества после заполнения всего доступного объема:
T_1a(p_5, p_6, T_k, T_x) := k(p_5, p_6, T_k, T_x)*T_1(p_5, p_6, T_k, T_x)/(p_5/p_1(p_5, p_6, T_k, T_x)*(T_1(p_5, p_6, T_k, T_x)/T_k*k(p_5, p_6, T_k, T_x) - 1) + 1)
p_1a(p_5, p_6, T_k, T_x) := p_6
h_1a(p_5, p_6, T_k, T_x) := h_Tpz(T_1a(p_5, p_6, T_k, T_x), p_1a(p_5, p_6, T_k, T_x), x_tst)
T_1a(p_5, p_6, T_k, T_x) = 131.744 K
T_1a(p_5, p_6, T_k, T_x) = -141.406 °C
p_1a(p_5, p_6, T_k, T_x) = 1 МПа
h_1a(p_5, p_6, T_k, T_x) = 692.109 кДж/кг
# Измедение удельного объема рабочего вещества при его переталкивании через регенератор:
ν_4/ν_1a == T_4/T_1a
T_4(p_5, p_6, T_k, T_x)/T_1a(p_5, p_6, T_k, T_x) = 0.129038
# Доля рабочего вещества, поступившего дополнительно в процессе переталкивания:
V_д(p_5, p_6, T_k, T_x) := 1 - T_4(p_5, p_6, T_k, T_x)/T_1a(p_5, p_6, T_k, T_x)
V_д(p_5, p_6, T_k, T_x) = 0.870962
# Параметры рабочего вещества перед регенератором после смешения:
h_2a(p_5, p_6, T_k, T_x) := (h_1(p_5, p_6, T_k, T_x)*V_д(p_5, p_6, T_k, T_x) + h_1a(p_5, p_6, T_k, T_x)*(1 - V_д(p_5, p_6, T_k, T_x)))
p_2a(p_5, p_6, T_k, T_x) := p_6
T_2a(p_5, p_6, T_k, T_x) := T_phz(p_2a(p_5, p_6, T_k, T_x), h_2a(p_5, p_6, T_k, T_x), x_tst)
h_2a(p_5, p_6, T_k, T_x) = 480.13 кДж/кг
p_2a(p_5, p_6, T_k, T_x) = 1 МПа
T_2a(p_5, p_6, T_k, T_x) = 91.0234 K
T_2a(p_5, p_6, T_k, T_x) = -182.127 °C
# Проверка (допущение: изменение энтальпии пропорционально изменению температуры):
T_2a_(p_5, p_6, T_k, T_x) := (T_4(p_5, p_6, T_k, T_x)/T_1a(p_5, p_6, T_k, T_x)*T_1a(p_5, p_6, T_k, T_x) + V_д(p_5, p_6, T_k, T_x)*T_1(p_5, p_6, T_k, T_x))
T_2a_(p_5, p_6, T_k, T_x) = 91.0318 K
T_2a_(p_5, p_6, T_k, T_x) = -182.118 °C
# Параметры рабочего вещества на выходе из регенератора:
T_5(p_5, p_6, T_k, T_x) := T_2a_(p_5, p_6, T_k, T_x) - ΔT_Р
p_5 = 0.1 МПа
h_5(p_5, p_6, T_k, T_x) := h_Tpz(T_5(p_5, p_6, T_k, T_x), p_5, x_tst)
s_5(p_5, p_6, T_k, T_x) := s_Tpz(T_5(p_5, p_6, T_k, T_x), p_5, x_tst)
T_5(p_5, p_6, T_k, T_x) = 86.0318 K
T_5(p_5, p_6, T_k, T_x) = -187.118 °C
h_5(p_5, p_6, T_k, T_x) = 452.214 кДж/кг
s_5(p_5, p_6, T_k, T_x) = 21.5786 кДж/(кг*K)
# Условие работоспособности КГМ:
T_5(p_5, p_6, T_k, T_x) > T_1(p_5, p_6, T_k, T_x) = 1
T_5(p_5, p_6, T_k, T_x) = 86.0318 K
T_1(p_5, p_6, T_k, T_x) = 85 K
# Параметры рабочего вещества в конце изоэнтропного сжатия:
s_6'(p_5, p_6, T_k, T_x) := s_5(p_5, p_6, T_k, T_x)
p_6'(p_5, p_6, T_k, T_x) := p_6
T_6'(p_5, p_6, T_k, T_x) := T_psz(p_6'(p_5, p_6, T_k, T_x), s_6'(p_5, p_6, T_k, T_x), x_tst)
h_6'(p_5, p_6, T_k, T_x) := h_psz(p_6'(p_5, p_6, T_k, T_x), s_6'(p_5, p_6, T_k, T_x), x_tst)
s_6'(p_5, p_6, T_k, T_x) = 21.5786 кДж/(кг*K)
p_6'(p_5, p_6, T_k, T_x) = 1 МПа
T_6'(p_5, p_6, T_k, T_x) = 216.048 K
T_6'(p_5, p_6, T_k, T_x) = -57.1019 °C
h_6'(p_5, p_6, T_k, T_x) = 1130.26 кДж/кг
# Параметры рабочего вещества в конце сжатия в КМ:
h_6(p_5, p_6, T_k, T_x) := h_5(p_5, p_6, T_k, T_x) + (h_6'(p_5, p_6, T_k, T_x) - h_5(p_5, p_6, T_k, T_x))/η_s_КМ
p_6 = 1 МПа
T_6(p_5, p_6, T_k, T_x) := T_phz(p_6, h_6(p_5, p_6, T_k, T_x), x_tst)
h_6(p_5, p_6, T_k, T_x) = 1299.77 кДж/кг
T_6(p_5, p_6, T_k, T_x) = 248.68 K
T_6(p_5, p_6, T_k, T_x) = -24.4696 °C
# Удельная работа КМ:
l_k(p_5, p_6, T_k, T_x) := h_6(p_5, p_6, T_k, T_x) - h_5(p_5, p_6, T_k, T_x)
l_k(p_5, p_6, T_k, T_x) = 847.553 кДж/кг
# Удельная тепловая нагрузка на охладитель:
q_k(p_5, p_6, T_k, T_x) := h_6(p_5, p_6, T_k, T_x) - h_1(p_5, p_6, T_k, T_x)
q_k(p_5, p_6, T_k, T_x) = 851.043 кДж/кг
# Из уравнения теплового баланса ступени охлаждения интегральная  изобарная холодопроизводительность:
q_0(p_5, p_6, T_k, T_x) := h_5(p_5, p_6, T_k, T_x) - h_1(p_5, p_6, T_k, T_x)
q_0(p_5, p_6, T_k, T_x) = 3.49012 кДж/кг
# Проверка энергетического баланса:
|q_k(p_5, p_6, T_k, T_x) - (q_0(p_5, p_6, T_k, T_x) + l_k(p_5, p_6, T_k, T_x))|/q_k(p_5, p_6, T_k, T_x) = 0 %
# Массовый расход рабочего вещества:
G_0(p_5, p_6, T_k, T_x) := Q_x/q_0(p_5, p_6, T_k, T_x)
G_0(p_5, p_6, T_k, T_x) = 103.148 кг/ч
# Объемный расход рабочего вещества при условиях на всасывании:
V_0(p_5, p_6, T_k, T_x) := G_0(p_5, p_6, T_k, T_x)/ρ_Tpz(T_5(p_5, p_6, T_k, T_x), p_5, x_tst)
V_0(p_5, p_6, T_k, T_x) = 184.619 м^3/ч
# Мощность КМ:
N_КМ(p_5, p_6, T_k, T_x) := l_k(p_5, p_6, T_k, T_x)*G_0(p_5, p_6, T_k, T_x)
N_КМ(p_5, p_6, T_k, T_x) = 24.2844 кВт
# Тепловая нагрузка на охладитель:
Q_k(p_5, p_6, T_k, T_x) := G_0(p_5, p_6, T_k, T_x)*q_k(p_5, p_6, T_k, T_x)
Q_k(p_5, p_6, T_k, T_x) = 24.3844 кВт
# Холодильный коэффициент:
ε(p_5, p_6, T_k, T_x) := Q_x/N_КМ(p_5, p_6, T_k, T_x)
ε(p_5, p_6, T_k, T_x) = 0.00411788
# Холодильный коэффицент в цикле Карно:
ε_К := T_x/(T_k - T_x) = 0.333333
# Степень термодинамического совершенства:
η_t(p_5, p_6, T_k, T_x) := ε(p_5, p_6, T_k, T_x)/ε_К
η_t(p_5, p_6, T_k, T_x) = 0.0123536
Given
q_0(p_5, p_6, T_k, T_x) == 0
T_xx_min := Find(T_x) = 18.1067 K
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5*МПа
1*МПа
T_xx_min = 18.1067 K
50*МПа
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# 200 K
# 100 K
# 50 K
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# 200 K
# 100 K
# 50 K
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# Список литературы для самостоятельного изучения:
#
# 1. Криогенные системы. Том 1. Основы теории и расчета. А.М. Архаров, И.В. Марфенина, Е.И. Микулин.
# 2. Машины низкотемпературной техники. Криогенные машины и инструменты: учебник для вузов / Под общ. ред. А.М. Архарова и И.К. Буткевича, 2015.
# 3. Низкотемпературные газовые машины (криогенераторы). Архаров А.М., 1969.
# 4. Установки для трансформации и охлаждения: Сборник задач, Мартынов А.В., 1989.
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